*Heading
** Job name: Buckle-H0001 Model name: Buckle-H0001
** Generated by: Abaqus/CAE 2016
*Preprint, echo=NO, model=NO, history=NO, contact=NO
**
** PARTS
**
*Part, name=Shell
*Node
      1,          -1.,           0., 0.00100000005
      2,          -1.,           0.,           0.
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*Element, type=C3D8H
   1,  108,   11,   12,  107, 1075, 4849, 4850, 1074
   2,  107,   12,   13,  106, 1074, 4850, 4851, 1073
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*Element, type=C3D6H
3872,    3,  108, 1075,    4,   11, 4849
3873,    3, 1075, 1124,    4, 4849, 4898
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*Nset, nset=Shell, generate
     1,  31602,      1
*Elset, elset=Shell, generate
     1,  15800,      1
*Nset, nset=Mid-Top
 4,
*Nset, nset=Mid-Bottom
 3,
*Nset, nset=Right-Bottom
 7,
*Orientation, name=Ori-1, system=CYLINDRICAL
          0.,           0.,           0.,           0.,           0.,           1.
3, 0.
** Section: Homo
*Solid Section, elset=Shell, orientation=Ori-1, material=NeoHookean
,
*End Part
**
**
** ASSEMBLY
**
*Assembly, name=Assembly
**
*Instance, name=Shell-1, part=Shell
*End Instance
**
*Nset, nset=LeftRightPoint, instance=Shell-1
 1, 2, 7, 8
*Nset, nset=Set-11, instance=Shell-1
 7, 8
*Elset, elset=Set-11, instance=Shell-1
 7821, 7949
*End Assembly
**
** MATERIALS
**
*Material, name=NeoHookean
*Elastic
906512., 0.499
*Expansion, type=ORTHO
0.,1.,0.
**
** PREDEFINED FIELDS
**
** Name: Predefined Field-1   Type: Temperature
*Initial Conditions, type=TEMPERATURE
Shell-1.Shell, 0.
** ----------------------------------------------------------------
**
** STEP: Buckle
**
*Step, name=Buckle, nlgeom=NO, perturbation
*Buckle
15, , 23, 30
**
** BOUNDARY CONDITIONS
**
** Name: BC-1 Type: Displacement/Rotation
*Boundary, op=NEW, load case=1
Shell-1.Mid-Bottom, 1, 1
Shell-1.Mid-Bottom, 2, 2
Shell-1.Mid-Bottom, 3, 3
*Boundary, op=NEW, load case=2
Shell-1.Mid-Bottom, 1, 1
Shell-1.Mid-Bottom, 2, 2
Shell-1.Mid-Bottom, 3, 3
** Name: BC-2 Type: Displacement/Rotation
*Boundary, op=NEW, load case=1
Shell-1.Mid-Top, 1, 1
Shell-1.Mid-Top, 2, 2
*Boundary, op=NEW, load case=2
Shell-1.Mid-Top, 1, 1
Shell-1.Mid-Top, 2, 2
** Name: BC-3 Type: Displacement/Rotation
*Boundary, op=NEW, load case=1
Set-11, 2, 2
*Boundary, op=NEW, load case=2
Set-11, 2, 2
**
** PREDEFINED FIELDS
**
** Name: Predefined Field-2   Type: Temperature
*Temperature
Shell-1.Shell, 1.
**
** OUTPUT REQUESTS
**
*Restart, write, frequency=0
**
** FIELD OUTPUT: F-Output-1
**
*Output, field, variable=PRESELECT
*NODE FILE
U
*End Step
