*Heading
** Job name: l1-is-1--l2-is-11-H0001-M15 Model name: l1-is-1--l2-is-11-H0001-M15
** Generated by: Abaqus/CAE 2016
*Preprint, echo=NO, model=NO, history=NO, contact=NO
**
** PARTS
**
*Part, name=Shell
*Node
      1,          -1.,           0., 0.00100000005
      2,          -1.,           0.,           0.
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*Element, type=C3D8H
   1,  108,   11,   12,  107, 1075, 4849, 4850, 1074
   2,  107,   12,   13,  106, 1074, 4850, 4851, 1073
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*Element, type=C3D6H
3872,    3,  108, 1075,    4,   11, 4849
3873,    3, 1075, 1124,    4, 4849, 4898
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*Nset, nset=Shell, generate
     1,  31602,      1
*Elset, elset=Shell, generate
     1,  15800,      1
*Nset, nset=Mid-Top
 4,
*Nset, nset=Mid-Bottom
 3,
*Nset, nset=Right-Bottom
 7,
** Section: Homo
*Solid Section, elset=Shell, material=NeoHookean
,
*End Part
**
**
** ASSEMBLY
**
*Assembly, name=Assembly
**
*Instance, name=Shell-1, part=Shell
*End Instance
**
*Nset, nset=LeftRightPoint, instance=Shell-1
 1, 2, 7, 8
*End Assembly
**
** MATERIALS
**
*Material, name=NeoHookean
*Depvar
     10,
*User Material, constants=2
906512., 0.499
** ----------------------------------------------------------------
**
** STEP: Growth
**
*IMPERFECTION, FILE=Buckle-H0001, STEP=1
15,-1E-4
*Step, name=Growth, nlgeom=YES, inc=10000
*Static
1e-10, 10., 1e-12, 0.1
**
** BOUNDARY CONDITIONS
**
** Name: BC-1 Type: Displacement/Rotation
*Boundary
Shell-1.Mid-Bottom, 1, 1
Shell-1.Mid-Bottom, 2, 2
Shell-1.Mid-Bottom, 3, 3
** Name: BC-2 Type: Displacement/Rotation
*Boundary
Shell-1.Mid-Top, 1, 1
Shell-1.Mid-Top, 2, 2
Shell-1.Mid-Top, 3, 3
** Name: BC-3 Type: Displacement/Rotation
*Boundary
LeftRightPoint, 2, 2
**
** OUTPUT REQUESTS
**
*Restart, write, frequency=0
**
** FIELD OUTPUT: F-Output-1
**
*Output, field
*Node Output
CF, COORD, RF, U
*Element Output, directions=YES
LE, PE, PEEQ, PEMAG, S, SDV
*Contact Output
CDISP, CSTRESS
**
** HISTORY OUTPUT: H-Output-1
**
*Output, history, variable=PRESELECT
*End Step
